OpenVSP model (file version 5), 20 components.
Geometry view with OpenVSP parameter names; values to 6 digits, angles in degrees, lengths in the model's unit.
Overall bounding box: X_Min=-0.382226 X_Len=7.74102 Y_Min=-5.3123 Y_Len=10.6246 Z_Min=-0.819686 Z_Len=3.87067

Stack "Fuselage"
  location (X Y Z) 0 0 0, rotation 0 0 0
  bounding box size 6.81223 1.33985 1.5935
  mass: Density=1 Shell_Flag=1 Mass_Area=4.921 Mass_Prior=0
  cross sections:
    n  XDelta  YDelta  ZDelta  shape
    0  0       0       0       point
    1  2.25    0       0       general fuselage BotStr=1.83 BotTanAngle=90 CornerRad=0 Height=1.42 LowStr=1.83 MaxWidthLoc=0 TopStr=1.81313 TopTanAngle=90 UpStr=1.83 Width=1.27
    2  1.93    0       0       general fuselage BotStr=1.82157 BotTanAngle=90 CornerRad=0 Height=1.42 LowStr=1.82157 MaxWidthLoc=0 TopStr=1.83 TopTanAngle=90 UpStr=1.83 Width=1.27
    3  2.25    0       0.45    point

Wing "Main Wing"
  location (X Y Z) 2.4869 0.362377 -0.367551, rotation 0 0 0
  symmetric about XZ
  bounding box size 1.62375 9.43661 0.14014
  mass: Density=1 Shell_Flag=1 Mass_Area=6.149 Mass_Prior=0
  totals: TotalSpan=8.66602 TotalProjectedSpan=8.66602 TotalChord=0.870723 TotalArea=7.54571 TotalAR=9.95267
  root: chord 1.2802, twist 0, NACA 4-series Camber=0.0519743 CamberLoc=0.2 ThickChord=0.1
  sections:
    n  Span     Root_Chord  Tip_Chord  Area     Sweep  Sweep_Location  Dihedral  Twist  Twist_Location  tip airfoil
    1  4.33301  1.2802      0.461249   3.77285  15     0               0         0      0.25            as above

Wing "Box V Wing", child of "Main Wing"
  location (X Y Z) 3.64494 4.69337 -0.364587, rotation 74.8613 0 0; relative location 1.15804 4.331 0.00296336, rotation 74.8613 0 0
  symmetric about XZ
  bounding box size 1.50475 10.6182 2.20354
  mass: Density=1 Shell_Flag=1 Mass_Area=6.149 Mass_Prior=0
  totals: TotalSpan=4.44654 TotalProjectedSpan=4.44654 TotalChord=0.553304 TotalArea=2.46029 TotalAR=8.03635
  root: chord 0.469109, twist 0, NACA 4-series Camber=0 CamberLoc=0.2 ThickChord=0.1
  sections:
    n  Span     Root_Chord  Tip_Chord  Area     Sweep    Sweep_Location  Dihedral  Twist  Twist_Location  tip airfoil
    1  2.22327  0.469109    0.637498   1.23014  21.3023  0               0         0      0.25            as above

Wing "Box Connect Wing", child of "Box V Wing"
  location (X Y Z) 5.32182 0 1.78575, rotation 0 0 0; relative location 1.67688 -4.69337 2.15034, rotation 0 0 0
  symmetric about XZ
  bounding box size 2.85588 10.6246 0.203815
  mass: Density=1 Shell_Flag=1 Mass_Area=6.149 Mass_Prior=0
  totals: TotalSpan=10.5615 TotalProjectedSpan=10.5615 TotalChord=1.3461 TotalArea=14.2169 TotalAR=7.84606
  root: chord 2.03697, twist 0, NACA 4-series Camber=0 CamberLoc=0.2 ThickChord=0.1
  sections:
    n  Span     Root_Chord  Tip_Chord  Area     Sweep     Sweep_Location  Dihedral  Twist  Twist_Location  tip airfoil
    1  5.28077  2.03697     0.65522    7.10843  -8.81381  0               0         0      0.25            as above

Wing "Rear V Tail", child of "Box Connect Wing"
  location (X Y Z) 4.80382 0 0.449143, rotation 90 0 0; relative location -0.518006 0 -1.33661, rotation 90 0 0
  bounding box size 2.5271 0.142611 2.60184
  mass: Density=1 Shell_Flag=1 Mass_Area=6.149 Mass_Prior=0
  totals: TotalSpan=2.57122 TotalProjectedSpan=2.57122 TotalChord=1.07599 TotalArea=2.76662 TotalAR=2.38962
  root: chord 1.42528, twist 0, NACA 4-series Camber=0 CamberLoc=0.2 ThickChord=0.1
  sections:
    n  Span     Root_Chord  Tip_Chord  Area     Sweep  Sweep_Location  Dihedral  Twist  Twist_Location  tip airfoil
    1  2.57122  1.42528     0.72671    2.76662  35     0               0         0      0.25            as above

Blank "Passengers"
  location (X Y Z) 3.215 0 0, rotation 0 0 0
  Mass: Point_Mass=500 Point_Mass_Flag=1

Wing "Prop Wing Comps"
  location (X Y Z) 3.836 0.551669 0.615103, rotation 0 0 0
  symmetric about XZ
  bounding box size 0.861264 7.57203 0.0861764
  mass: Density=1 Shell_Flag=1 Mass_Area=6.149 Mass_Prior=0
  totals: TotalSpan=6.46869 TotalProjectedSpan=6.46869 TotalChord=0.861264 TotalArea=5.57125 TotalAR=7.5107
  root: chord 0.861264, twist 0, NACA 4-series Camber=0 CamberLoc=0.2 ThickChord=0.1
  sections:
    n  Span     Root_Chord  Tip_Chord  Area     Sweep  Sweep_Location  Dihedral  Twist  Twist_Location  tip airfoil
    1  3.23435  0.861264    0.861264   2.78563  0      0               0         0      0.25            as above

Blank "MotorPropMidRR"
  location (X Y Z) 5.2 2 0.6, rotation 0 0 0
  Mass: Point_Mass=25 Point_Mass_Flag=1

Blank "MotorPropMidFL"
  location (X Y Z) 3.3 -2 0.6, rotation 0 0 0
  Mass: Point_Mass=25 Point_Mass_Flag=1

Blank "MotorPropMidRL"
  location (X Y Z) 5.2 -2 0.6, rotation 0 0 0
  Mass: Point_Mass=25 Point_Mass_Flag=1

Blank "MotorPropMidFR"
  location (X Y Z) 3.3 2 0.6, rotation 0 0 0
  Mass: Point_Mass=25 Point_Mass_Flag=1

Blank "MotorPropTopR"
  location (X Y Z) 7.1 2.22 1.8, rotation 0 0 0
  Mass: Point_Mass=25 Point_Mass_Flag=1

Blank "MotorPropTopL"
  location (X Y Z) 7.1 -2.22 1.8, rotation 0 0 0
  Mass: Point_Mass=25 Point_Mass_Flag=1

Blank "MotorPropBotL"
  location (X Y Z) 1.6 -1.5 -0.3, rotation 0 0 0
  Mass: Point_Mass=25 Point_Mass_Flag=1

Blank "MotorPropBotR"
  location (X Y Z) 1.6 1.5 -0.3, rotation 0 0 0
  Mass: Point_Mass=25 Point_Mass_Flag=1

Blank "Turbogenerator"
  location (X Y Z) 4.5 0 -0.1, rotation 0 0 0
  Mass: Point_Mass=66.3 Point_Mass_Flag=1

Blank "Batteries"
  location (X Y Z) 1.8 0 -0.5, rotation 0 0 0
  Mass: Point_Mass=297 Point_Mass_Flag=1

Blank "R_FW_Motor"
  location (X Y Z) 4.2 5.2 1.75, rotation 0 0 0
  Mass: Point_Mass=25 Point_Mass_Flag=1

Blank "L_FW_Motor"
  location (X Y Z) 4.2 -5.2 1.75, rotation 0 0 0
  Mass: Point_Mass=25 Point_Mass_Flag=1

Blank "Fuel Tank"
  location (X Y Z) 5.9 0 1.2, rotation 0 0 0
  Mass: Point_Mass=50 Point_Mass_Flag=1

VSPAERO settings: Sref=7.54571 bref=8.66602 cref=0.870723 Xcg=3.5669 Ycg=6.57868e-07 Zcg=0.288687 AlphaStart=-10 AlphaEnd=10 AlphaNpts=21 BetaStart=0 BetaEnd=20 BetaNpts=1 MachStart=0.09 MachEnd=0 MachNpts=1 ReCref=1e+07 Vinf=100 Rho=0.002377
